<Lems>

    <!-- Specify which component to run -->
    <Target component="sim1"/>

    <!-- Include core NeuroML2 ComponentType definitions -->
    <Include file="Cells.xml"/>
    <Include file="Networks.xml"/>
    <Include file="Simulation.xml"/>

    <Include file="Figure7.net.nml"/>

    <Simulation id="sim1" length="1000ms" step="0.01ms" target="net1">

        <Display id="d1" title="Voltage response (mV)" timeScale="1ms" xmin="-50" xmax="1050" ymin="-80" ymax="50">
            <Line id="v" quantity="muscle/0/SingleCompMuscleCell/v" scale="1mV"  color="#ffffff" timeScale="1ms"/>
        </Display>

        <Display id="d2" title="Rate variables (dimensionless)" timeScale="1ms" xmin="-50" xmax="1050" ymin="-0.1" ymax="1.1">

            <Line id="EGL_19 m" quantity="muscle/0/SingleCompMuscleCell/biophys/membraneProperties/EGL_19_all/EGL_19/m/q" scale="1"  color="#ff00ff" timeScale="1ms"/>
            <Line id="EGL_19 h" quantity="muscle/0/SingleCompMuscleCell/biophys/membraneProperties/EGL_19_all/EGL_19/h/q" scale="1"  color="#ff0000" timeScale="1ms"/>
            <Line id="SHK_1 n" quantity="muscle/0/SingleCompMuscleCell/biophys/membraneProperties/SHK_1_all/SHK_1/n/q" scale="1"  color="#000000" timeScale="1ms"/>

        </Display>
   <!--

        <Display id="d4" title="Current densities at 700 pA (uA/cm2)" timeScale="1ms" xmin="0" xmax="50" ymin="-20" ymax="7">
            <Line id="Leak" quantity="mc1/6/SingleCompMuscleCell/biophys/membraneProperties/Leak_all/iDensity" scale="1uA_per_cm2"  color="#550000" timeScale="1ms"/>
            <Line id="k_slow" quantity="mc1/6/SingleCompMuscleCell/biophys/membraneProperties/k_slow_all/iDensity" scale="1uA_per_cm2"  color="#005500" timeScale="1ms"/>
            <Line id="k_fast" quantity="mc1/6/SingleCompMuscleCell/biophys/membraneProperties/k_fast_all/iDensity" scale="1uA_per_cm2"  color="#000055" timeScale="1ms"/>
            <Line id="ca_boyle" quantity="mc1/6/SingleCompMuscleCell/biophys/membraneProperties/ca_boyle_all/iDensity" scale="1uA_per_cm2"  color="#fff555" timeScale="1ms"/>

        </Display>

        <Display id="d5" title="Ca concentration (mM)" xmin="0" xmax="50" ymin="-1e-8" ymax="9e-8" timeScale="1ms">
            <Line id="Ca concentration" timeScale="1ms" quantity="mc1/6/SingleCompMuscleCell/caConc" scale="1 mM" color="#000000"/>
        </Display>-->

    </Simulation>

</Lems>
